*NODE
      1001,  0.0            ,  100.0          ,  100.0
      1002,  0.0            ,  100.0          ,  90.0
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*ELEMENT,TYPE=S3,ELSET=cube
      4001,      4032,      4029,      4037
      4002,      4033,      4032,      4036
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*SHELL SECTION, ELSET=cube, MATERIAL=steel
1.0       ,
*NSET, NSET=accn
      1045,
*NSET, NSET=cube_asi
      1001,      1002,      1003,      1004,      1005,      1006
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*ELSET, ELSET=cube_asi
      1001,      1002,      1003,      1004,      1005,      1006
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*ELSET, ELSET = _str_acou_SNEG
4001,4002,4003,4004,4005,4006
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*Surface, NAME = str_acou, TYPE = ELEMENT
_str_acou_SNEG,SNEG
*MATERIAL, NAME=steel
*DENSITY
7.8500E-09,0.0
*DAMPING, STRUCTURAL = 0.01
*ELASTIC, TYPE = ISOTROPIC
210000.0  ,0.3       ,0.0
