**
** ABAQUS Input Deck Generated by HyperMesh Version  : 2021.2.0.31
** Generated using HyperMesh-Abaqus Template Version : 2021.2.0.31
** Generated on 08-08-2024 at 00:19:52
**
**   Template:  ABAQUS/STANDARD 3D
**
*TIE, NAME = group1, POSITION TOLERANCE = 5.0
str_acou,acou_str
*INCLUDE, INPUT ="../MODEL/just_cube.inp"
*INCLUDE, INPUT ="../MODEL/cavity.inp"
*ELSET, ELSET=radpow_1_element
   5015281
** STEP: Step-1
*Step
 Step-1: Frequency Response
*Steady State Dynamics, direct, frequency scale=linear
 500,1000,51
*CLOAD, OP=NEW
accn,1,100.0
**
*Output,field,frequency=1
*CONTACT OUTPUT
AVNSQ
*Node output
 UT, POR
**
*OUTPUT, HISTORY
*ENERGY OUTPUT, ELSET = outer_infinite
RADPOW, RADEN
*ENERGY OUTPUT, ELSET = radpow_1_element
RADPOW, RADEN
*NODE OUTPUT, NSET = por
POR
*NODE OUTPUT, NSET = accn
A
*NODE PRINT, NSET = por, FREQUENCY = 1
POR
*NODE PRINT, NSET = accn, FREQUENCY = 1
A
*End step
*****
