*NODE
   3000000,  0.0            ,  70.0           ,  -40.0
   3000001,  0.0            ,  60.0           ,  -40.0
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*ELEMENT,TYPE=S4R,ELSET=cube_mesh
   3000000,   3000547,   3000548,   3000543,   3000544
   3000001,   3000548,   3000551,   3000552,   3000543
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*SHELL SECTION, ELSET=cube_mesh, MATERIAL=Steel
1.0       ,
*NSET, NSET=accn
   3000157,
*ELSET, ELSET = _str_acou_SPOS, GENERATE
3000000,3000599,1
*Surface, NAME = str_acou, TYPE = ELEMENT
_str_acou_SPOS,SPOS
*MATERIAL, NAME=Steel
*DENSITY
7.8500E-09,0.0
*ELASTIC, TYPE = ISOTROPIC
210000.0  ,0.3       ,0.0
** Define a surface interaction in order to calculate AVNSQ (ERP)
*SURFACE INTERACTION, NAME = dummy_One
*CONTACT PAIR, INTERACTION = dummy_One
str_acou
